OpenVSP model (file version 5), 5 components.
Geometry view with OpenVSP parameter names; values to 6 digits, angles in degrees, lengths in the model's unit.
Overall bounding box: X_Min=-0.000154966 X_Len=0.394973 Y_Min=-0.7 Y_Len=1.4 Z_Min=-0.135 Z_Len=0.27

Wing "WingGeom"
  location (X Y Z) 0 0 0, rotation 0 0 0
  symmetric about XZ
  bounding box size 0.394973 1.4 0.0482491
  totals: TotalSpan=1.4 TotalProjectedSpan=1.4 TotalChord=0.196562 TotalArea=0.231809 TotalAR=8.45522 MAC=0.184644
  root: chord 0.31, twist 0, NACA 4-series Camber=0.04 CamberLoc=0.4 ThickChord=0.15
  sections:
    n  Span    Root_Chord  Tip_Chord  Area       Sweep  Sweep_Location  Dihedral  Twist  Twist_Location  tip airfoil
    1  0.0875  0.31        0.235      0.0238437  22     0.4             0         -0.25  1               as above
    2  0.0875  0.235       0.19675    0.0188891  22     0               0         -0.25  1               NACA 4-series Camber=0 CamberLoc=0.2 ThickChord=0.12
    3  0.175   0.19675     0.1585     0.0310844  22     0               0         -0.5   1               as above
    4  0.35    0.1585      0.082      0.0420875  22     0               0         -1     1               as above
  SS_Control "SS_CONT_0": UStart=0.6 UEnd=0.8 Length_C_Start=0.25 Length_C_End=0.25 Length_Start=0.0434499 Length_End=0.0243248 LE_Flag=0 Surf_Type=2

Ellipsoid "EllipsoidGeom"
  location (X Y Z) 0.12 0.45 0, rotation 0 0 0
  symmetric about XZ
  bounding box size 0.14 0.96 0.06
  Design: A_Radius=0.07 B_Radius=0.03 C_Radius=0.03

Propeller "PropGeom"
  location (X Y Z) 0.135 0.45 0, rotation 0 0 0
  symmetric about XZ
  bounding box size 0 1.17 0.27
  Design: Diameter=0.27 NumBlade=3 Beta34=20 UseBeta34Flag=1 Feather=0 Rotate=0 Precone=0 ReverseFlag=0 FoldAngle=0 PropMode=2 AF=151.538 CLi=0.538798 Chord=0.177656 Solidity=0.169649 ConstructXoC=0.5 FeatherAxisXoC=0.5 FeatherOffsetXoC=0
  cross sections:
    n  RadiusFrac  shape
    0  0.2         ellipse Ellipse_Height=0.0054 Ellipse_Width=0.0108
    1  0.4         NACA 16-series Chord=0.0224438 IdealCl=0.7 ThickChord=0.144074
    2  1           NACA 16-series Chord=0.01755 IdealCl=0.2 ThickChord=0.03
  Chord along r/R (cubic Bezier): 0.2: 0.08, 0.333333: 0.15, 0.466667: 0.2, 0.6: 0.2, 0.716667: 0.2, 0.833333: 0.2, 0.95: 0.2, 0.966667: 0.2, 0.983333: 0.2, 1: 0.13
  Twist along r/R (PCHIP): 0.2: 46.75, 0.75: 20, 1: 13
  Thick along r/R (cubic Bezier): 0.2: 0.5, 0.233333: 0.3, 0.266667: 0.225, 0.3: 0.2, 0.4: 0.125, 0.5: 0.115, 0.6: 0.1, 0.733333: 0.075, 0.866667: 0.055, 1: 0.03
  CLI along r/R (cubic Bezier): 0.2: 0, 0.266667: 0.7, 0.333333: 0.7, 0.4: 0.7, 0.466667: 0.7, 0.533333: 0.7, 0.6: 0.7, 0.733333: 0.7, 0.866667: 0.7, 1: 0.2

Mesh "MeshGeom"
  location (X Y Z) 0 0 0, rotation 0 0 0
  bounding box size 0.394818 1.4 0.27
  triangle mesh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

Mesh "MeshGeom"
  location (X Y Z) 0 0 0, rotation 0 0 0
  bounding box size 0.394818 1.4 0.06
  triangle mesh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
